// SBML level 3 version 1

model iSIM()

  // Compartments:
  compartment c;
  compartment m;

  // Species:
  species M_m04c in c; M_m04c is "glucose";
  species M_m07c in c; M_m07c is "lactate";
  species M_m08c in c; M_m08c is "02";
  species M_m06c in c; M_m06c is "H20";
  species M_m03c in c; M_m03c is "CO2";
  species M_m01c in c; M_m01c is "ADP";
  species M_m09c in c; M_m09c is "Pi";
  species M_m02c in c; M_m02c is "ATP";
  species M_m05m in m; M_m05m is "H";
  species M_m05c in c; M_m05c is "H";

  // Parameters:
  cobra_default_lb = -1000;
  cobra_default_ub = 1000;
  cobra_0_bound = 0;
  minus_inf = -INF;
  plus_inf = INF;
  R_E1_lower_bound = -1 mmol_per_gDW_per_hr;

  // Reactions:
  R_E1: M_m04c -> ; R_E1_Vmax*M_m07c/(R_E1_Km + M_m07c); R_E1 is "glucose exchange";
    R_E1_Vmax = 1 mmol_per_gDW_per_hr; R_E1_Km = 1 mmol_per_gDW_per_hr;
  R_E2: M_m07c => ; R_E2_Vmax*M_m07c/(R_E2_Km + M_m07c); R_E2 is "lactate exchange";
    R_E2_Vmax = 1 mmol_per_gDW_per_hr; R_E2_Km = 1 mmol_per_gDW_per_hr;
  R_E3: M_m08c -> ; ; R_E3 is "O2 exchange";
  R_E4: M_m06c -> ; ; R_E4 is "H20 exchange";
  R_E5: M_m03c -> ; ; R_E5 is "CO2 exchange";
  R_R1: 2 M_m01c + 2 M_m09c + M_m04c => 2 M_m02c + 2 M_m07c + 2 M_m06c; ; R_R1 is "glycolysis";
  R_R2: 56 M_m05m + M_m07c + 3 M_m08c + M_m01c + M_m09c => 56 M_m05c + 4 M_m06c + 3 M_m03c + M_m02c; ; R_R2 is "TCA + ETC";
  R_R3: M_m01c + M_m09c + 4 M_m05c => M_m06c + M_m02c + 4 M_m05m; ; R_R3 is "ATP synthase";
  R_R4: M_m06c + M_m02c => M_m01c + M_m09c; ; R_R4 is "ATP demand";

  // Unit definitions:
  unit mmol_per_gDW_per_hr = 1e-3 mole / (gram * 3600 second);
end
